// SBML level 2 version 4

model D1_LTP_time_window()
  // D1_LTP_time_window

  // Compartments:
  compartment Spine = 1 MWBUILTINUNIT_liter;

  // Species:
  species AC5 in Spine = 700;  // substance in mole
  species AC5_ATP in Spine = 0;  // substance in mole
  species AC5_Ca in Spine = 0;  // substance in mole
  species AC5_Ca_ATP in Spine = 0;  // substance in mole
  species AC5_Ca_GaolfGTP in Spine = 0;  // substance in mole
  species AC5_Ca_GaolfGTP_ATP in Spine = 0;  // substance in mole
  species AC5_GaolfGTP in Spine = 0;  // substance in mole
  species AC5_GaolfGTP_ATP in Spine = 0;  // substance in mole
  species AMP in Spine = 0;  // substance in mole
  species ATP in Spine = 5000000;  // substance in mole
  species B56PP2A in Spine = 2000;  // substance in mole
  species B56PP2A_D32p75 in Spine = 0;  // substance in mole
  species B56PP2A_pARPP21 in Spine = 0;  // substance in mole
  species B56PP2Ap in Spine = 0;  // substance in mole
  species B56PP2Ap_D32p75 in Spine = 0;  // substance in mole
  species B56PP2Ap_pARPP21 in Spine = 0;  // substance in mole
  species B72PP2A in Spine = 2000;  // substance in mole
  species B72PP2A_D32p34 in Spine = 0;  // substance in mole
  species B72PP2A_D32p75 in Spine = 0;  // substance in mole
  species B72PP2A_pARPP21 in Spine = 0;  // substance in mole
  species B72PP2A_Ca_D32p34 in Spine = 0;  // substance in mole
  species B72PP2A_Ca_D32p75 in Spine = 0;  // substance in mole
  species B72PP2A_Ca in Spine = 0;  // substance in mole
  species B72PP2A_Ca_pARPP21 in Spine = 0;  // substance in mole
  species Ca in Spine = 60;  // substance in mole
  species CaM in Spine = 9000;  // substance in mole
  species CaM_Ca2 in Spine = 0;  // substance in mole
  species CaM_Ca4 in Spine = 0;  // substance in mole
  species CaM_Ca4_pARPP21 in Spine = 0;  // substance in mole
  species CaMKII in Spine = 20000;  // substance in mole
  species CaMKII_CaM_Ca4 in Spine = 0;  // substance in mole
  species CaMKII_CaM in Spine = 0;  // substance in mole
  species CaMKII_CaM_Ca2 in Spine = 0;  // substance in mole
  species CaMKII_CaM_Ca2_psd in Spine = 0;  // substance in mole
  species CaMKII_CaM_psd in Spine = 0;  // substance in mole
  species CaMKII_CaM_Ca4_psd in Spine = 0;  // substance in mole
  species CaMKII_psd in Spine = 0;  // substance in mole
  species cAMP in Spine = 0;  // substance in mole
  species Substrate in Spine = 3000;  // substance in mole
  species CDK5 in Spine = 1800;  // substance in mole
  species CDK5_D32 in Spine = 0;  // substance in mole
  species D1R in Spine = 2000;  // substance in mole
  species D1R_DA in Spine = 0;  // substance in mole
  species D1R_Golf_DA in Spine = 0;  // substance in mole
  species D1R_Golf in Spine = 0;  // substance in mole
  species D32p34 in Spine = 0;  // substance in mole
  species D32p75 in Spine = 0;  // substance in mole
  species DA in Spine = 20;  // substance in mole
  species D32 in Spine = 50000;  // substance in mole
  species GaolfGDP in Spine = 0;  // substance in mole
  species GaolfGTP in Spine = 0;  // substance in mole
  species Gbgolf in Spine = 0;  // substance in mole
  species Golf in Spine = 2000;  // substance in mole
  species pCaMKII in Spine = 0;  // substance in mole
  species pCaMKII_CaM_Ca4 in Spine = 0;  // substance in mole
  species pCaMKII_CaM in Spine = 0;  // substance in mole
  species pCaMKII_CaM_Ca2 in Spine = 0;  // substance in mole
  species pCaMKII_CaM_Ca2_psd in Spine = 0;  // substance in mole
  species pCaMKII_CaM_psd in Spine = 0;  // substance in mole
  species pCaMKII_CaM_Ca4_psd in Spine = 0;  // substance in mole
  species pCaMKII_psd in Spine = 0;  // substance in mole
  species pSubstrate in Spine = 0;  // substance in mole
  species PDE4 in Spine = 2000;  // substance in mole
  species PDE4_cAMP in Spine = 0;  // substance in mole
  species PDE10r in Spine = 700;  // substance in mole
  species PDE10r_cAMP in Spine = 0;  // substance in mole
  species PDE10c in Spine = 0;  // substance in mole
  species PDE10c_cAMP in Spine = 0;  // substance in mole
  species PKA in Spine = 1200;  // substance in mole
  species PKAc in Spine = 0;  // substance in mole
  species PKAc_B56PP2A in Spine = 0;  // substance in mole
  species PKAc_D32 in Spine = 0;  // substance in mole
  species PKAc_ARPP21 in Spine = 0;  // substance in mole
  species PKA_Ca2MP in Spine = 0;  // substance in mole
  species PKA_Ca4MP in Spine = 0;  // substance in mole
  species PKAc_D32p75 in Spine = 0;  // substance in mole
  species PKAreg in Spine = 0;  // substance in mole
  species PP1 in Spine = 3000;  // substance in mole
  species PP1_pCaMKII_psd in Spine = 0;  // substance in mole
  species PP1_pSubstrate in Spine = 0;  // substance in mole
  species PP1_D32p34 in Spine = 0;  // substance in mole
  species CaMKII_CaM_Ca4_psd_CaMKII_CaM_Ca4_psd in Spine = 0;  // substance in mole
  species pCaMKII_CaM_Ca4_psd_CaMKII_CaM_Ca4_psd in Spine = 0;  // substance in mole
  species CaMKII_CaM_Ca4_CaMKII_CaM_Ca4 in Spine = 0;  // substance in mole
  species pCaMKII_CaM_Ca4_CaMKII_CaM_Ca4 in Spine = 0;  // substance in mole
  species PP2B in Spine = 4000;  // substance in mole
  species PP2Bc in Spine = 0;  // substance in mole
  species PP2Bc_D32p34 in Spine = 0;  // substance in mole
  species PP2B_CaM in Spine = 0;  // substance in mole
  species PP2B_CaM_Ca2 in Spine = 0;  // substance in mole
  species pARPP21 in Spine = 0;  // substance in mole
  species ARPP21 in Spine = 20000;  // substance in mole
  species pCaMKII_psd_Substrate in Spine = 0;  // substance in mole
  species pCaMKII_CaM_psd_Substrate in Spine = 0;  // substance in mole
  species pCaMKII_CaM_Ca2_psd_Substrate in Spine = 0;  // substance in mole
  species pCaMKII_CaM_Ca4_psd_Substrate in Spine = 0;  // substance in mole
  species CaMKII_CaM_psd_Substrate in Spine = 0;  // substance in mole
  species CaMKII_CaM_Ca2_psd_Substrate in Spine = 0;  // substance in mole
  species CaMKII_CaM_Ca4_psd_Substrate in Spine = 0;  // substance in mole

  // Parameters:
  kf_GaolfGTP__GaolfGDP = 30 MWDERIVEDUNIT_1__second;
  kf_D1R_Golf_DA__GbgolfXD1R_DAXGaolfGTP = 15 MWDERIVEDUNIT_1__second;
  kf_D1R_GolfXDA__D1R_Golf_DA = 0.05 MWDERIVEDUNIT_1__nanomolarity_second;
  kr_D1R_GolfXDA__D1R_Golf_DA = 250 MWDERIVEDUNIT_1__second;
  kf_D1RXDA__D1R_DA = 0.05 MWDERIVEDUNIT_1__nanomolarity_second;
  kr_D1RXDA__D1R_DA = 250 MWDERIVEDUNIT_1__second;
  kf_AC5XGaolfGTP__AC5_GaolfGTP = 10 MWDERIVEDUNIT_1__nanomolarity_second;
  kr_AC5XGaolfGTP__AC5_GaolfGTP = 1 MWDERIVEDUNIT_1__second;
  kf_CaMXCa__CaM_Ca2 = 0.006 MWDERIVEDUNIT_1__nanomolarity_second;
  kr_CaMXCa__CaM_Ca2 = 20 MWDERIVEDUNIT_1__second;
  kf_PP2BXCaM__PP2B_CaM = 0.1 MWDERIVEDUNIT_1__nanomolarity_second;
  kr_PP2BXCaM__PP2B_CaM = 3000 MWDERIVEDUNIT_1__second;
  kf_CaM_Ca4XPP2B__PP2Bc = 0.1 MWDERIVEDUNIT_1__nanomolarity_second;
  kr_CaM_Ca4XPP2B__PP2Bc = 0.003 MWDERIVEDUNIT_1__second;
  kf_PKAcXD32__PKAc_D32 = 0.01 MWDERIVEDUNIT_1__nanomolarity_second;
  kr_PKAcXD32__PKAc_D32 = 200 MWDERIVEDUNIT_1__second;
  kf_PKAc_D32__D32p34XPKAc = 10 MWDERIVEDUNIT_1__second;
  kf_PKAcXB56PP2A__PKAc_B56PP2A = 0.001 MWDERIVEDUNIT_1__nanomolarity_second;
  kr_PKAcXB56PP2A__PKAc_B56PP2A = 0.3 MWDERIVEDUNIT_1__second;
  kf_PKAc_B56PP2A__B56PP2ApXPKAc = 0.2 MWDERIVEDUNIT_1__second;
  kf_D32p34XPP1__PP1_D32p34 = 1 MWDERIVEDUNIT_1__nanomolarity_second;
  kr_D32p34XPP1__PP1_D32p34 = 1.5 MWDERIVEDUNIT_1__second;
  kf_CDK5XD32__CDK5_D32 = 0.001 MWDERIVEDUNIT_1__nanomolarity_second;
  kr_CDK5XD32__CDK5_D32 = 100 MWDERIVEDUNIT_1__second;
  kf_CDK5_D32__CDK5XD32p75 = 10 MWDERIVEDUNIT_1__second;
  kf_D32p75XPKAc__PKAc_D32p75 = 0.1 MWDERIVEDUNIT_1__nanomolarity_second;
  kr_D32p75XPKAc__PKAc_D32p75 = 100 MWDERIVEDUNIT_1__second;
  kf_B72PP2AXCa__B72PP2A_Ca = 0.01 MWDERIVEDUNIT_1__nanomolarity_second;
  kr_B72PP2AXCa__B72PP2A_Ca = 10 MWDERIVEDUNIT_1__second;
  kf_B56PP2ApXD32p75__B56PP2Ap_D32p75 = 0.015 MWDERIVEDUNIT_1__nanomolarity_second;
  kr_B56PP2ApXD32p75__B56PP2Ap_D32p75 = 100 MWDERIVEDUNIT_1__second;
  kf_B72PP2AXD32p75__B72PP2A_D32p75 = 0.008 MWDERIVEDUNIT_1__nanomolarity_second;
  kr_B72PP2AXD32p75__B72PP2A_D32p75 = 100 MWDERIVEDUNIT_1__second;
  kf_D32p75XB72PP2A_Ca__B72PP2A_Ca_D32p75 = 0.015 MWDERIVEDUNIT_1__nanomolarity_second;
  kr_D32p75XB72PP2A_Ca__B72PP2A_Ca_D32p75 = 100 MWDERIVEDUNIT_1__second;
  kf_B56PP2Ap_D32p75__B56PP2ApXD32 = 8 MWDERIVEDUNIT_1__second;
  kf_B72PP2A_D32p75__B72PP2AXD32 = 1.5 MWDERIVEDUNIT_1__second;
  kf_B72PP2A_Ca_D32p75__B72PP2A_CaXD32 = 8 MWDERIVEDUNIT_1__second;
  kf_D32p34XPP2Bc__PP2Bc_D32p34 = 1.3 MWDERIVEDUNIT_1__nanomolarity_second;
  kr_D32p34XPP2Bc__PP2Bc_D32p34 = 0.1 MWDERIVEDUNIT_1__second;
  kf_CaM_Ca2XCa__CaM_Ca4 = 0.1 MWDERIVEDUNIT_1__nanomolarity_second;
  kr_CaM_Ca2XCa__CaM_Ca4 = 1000 MWDERIVEDUNIT_1__second;
  kf_CaXPP2B_CaM__PP2B_CaM_Ca2 = 0.006 MWDERIVEDUNIT_1__nanomolarity_second;
  kr_CaXPP2B_CaM__PP2B_CaM_Ca2 = 0.0002 MWDERIVEDUNIT_1__second;
  kf_CaXPP2B_CaM_Ca2__PP2Bc = 0.1 MWDERIVEDUNIT_1__nanomolarity_second;
  kr_CaXPP2B_CaM_Ca2__PP2Bc = 100 MWDERIVEDUNIT_1__second;
  kf_CaM_Ca2XPP2B__PP2B_CaM_Ca2 = 0.1 MWDERIVEDUNIT_1__nanomolarity_second;
  kr_CaM_Ca2XPP2B__PP2B_CaM_Ca2 = 0.03 MWDERIVEDUNIT_1__second;
  kf_AC5XCa__AC5_Ca = 0.001 MWDERIVEDUNIT_1__nanomolarity_second;
  kr_AC5XCa__AC5_Ca = 10 MWDERIVEDUNIT_1__second;
  kf_AC5_CaXGaolfGTP__AC5_Ca_GaolfGTP = 10 MWDERIVEDUNIT_1__nanomolarity_second;
  kr_AC5_CaXGaolfGTP__AC5_Ca_GaolfGTP = 1 MWDERIVEDUNIT_1__second;
  kf_D32p75XB56PP2A__B56PP2A_D32p75 = 0.008 MWDERIVEDUNIT_1__nanomolarity_second;
  kr_D32p75XB56PP2A__B56PP2A_D32p75 = 100 MWDERIVEDUNIT_1__second;
  kf_B56PP2A_D32p75__B56PP2AXD32 = 1.5 MWDERIVEDUNIT_1__second;
  kf_B72PP2A_Ca_D32p34__B72PP2A_CaXD32 = 3 MWDERIVEDUNIT_1__second;
  kf_B72PP2A_D32p34__D32XB72PP2A = 3 MWDERIVEDUNIT_1__second;
  kf_D32p34XB72PP2A_Ca__B72PP2A_Ca_D32p34 = 0.0005 MWDERIVEDUNIT_1__nanomolarity_second;
  kr_D32p34XB72PP2A_Ca__B72PP2A_Ca_D32p34 = 1 MWDERIVEDUNIT_1__second;
  kf_D32p34XB72PP2A__B72PP2A_D32p34 = 0.0005 MWDERIVEDUNIT_1__nanomolarity_second;
  kr_D32p34XB72PP2A__B72PP2A_D32p34 = 1 MWDERIVEDUNIT_1__second;
  kf_PP2Bc_D32p34__D32XPP2Bc = 1.2 MWDERIVEDUNIT_1__second;
  kf_B56PP2Ap__B56PP2A = 0.008 MWDERIVEDUNIT_1__second;
  kf_cAMPXPKA__PKA_Ca2MP = 0.026 MWDERIVEDUNIT_1__nanomolarity_second;
  kr_cAMPXPKA__PKA_Ca2MP = 350 MWDERIVEDUNIT_1__second;
  kf_cAMPXPKA_Ca2MP__PKA_Ca4MP = 0.0346 MWDERIVEDUNIT_1__nanomolarity_second;
  kr_cAMPXPKA_Ca2MP__PKA_Ca4MP = 50 MWDERIVEDUNIT_1__second;
  kf_PKA_Ca4MP__PKAcXPKAreg = 50 MWDERIVEDUNIT_1__second;
  kr_PKA_Ca4MP__PKAcXPKAreg = 0.03 MWDERIVEDUNIT_1__nanomolarity_second;
  kf_cAMPXPDE4__PDE4_cAMP = 0.03 MWDERIVEDUNIT_1__nanomolarity_second;
  kr_cAMPXPDE4__PDE4_cAMP = 1 MWDERIVEDUNIT_1__second;
  kf_PDE4_cAMP__PDE4XAMP = 2.5 MWDERIVEDUNIT_1__second;
  kf_PDE10rX2_cAMP__PDE10c = 1e-6 MWDERIVEDUNIT_1__nanomolarity___2_second;
  kr_PDE10rX2_cAMP__PDE10c = 1 MWDERIVEDUNIT_1__second;
  kf_PDE10r_cAMP__PDE10rXAMP = 3 MWDERIVEDUNIT_1__second;
  kf_cAMPXPDE10r__PDE10r_cAMP = 0.1 MWDERIVEDUNIT_1__nanomolarity_second;
  kr_cAMPXPDE10r__PDE10r_cAMP = 2 MWDERIVEDUNIT_1__second;
  kf_PDE10c_cAMP__PDE10cXAMP = 10 MWDERIVEDUNIT_1__second;
  kf_GaolfGDPXGbgolf__Golf = 100 MWDERIVEDUNIT_1__nanomolarity_second;
  kf_AC5_GaolfGTPXATP__AC5_GaolfGTP_ATP = 0.00255 MWDERIVEDUNIT_1__nanomolarity_second;
  kr_AC5_GaolfGTPXATP__AC5_GaolfGTP_ATP = 1 MWDERIVEDUNIT_1__second;
  kf_AC5XATP__AC5_ATP = 0.0001 MWDERIVEDUNIT_1__nanomolarity_second;
  kr_AC5XATP__AC5_ATP = 1 MWDERIVEDUNIT_1__second;
  kf_AC5_CaXATP__AC5_Ca_ATP = 7.5e-5 MWDERIVEDUNIT_1__nanomolarity_second;
  kr_AC5_CaXATP__AC5_Ca_ATP = 1 MWDERIVEDUNIT_1__second;
  kf_AC5_Ca_GaolfGTPXATP__AC5_Ca_GaolfGTP_ATP = 0.0013 MWDERIVEDUNIT_1__nanomolarity_second;
  kr_AC5_Ca_GaolfGTPXATP__AC5_Ca_GaolfGTP_ATP = 1 MWDERIVEDUNIT_1__second;
  kf_GaolfGTPXAC5_ATP__AC5_GaolfGTP_ATP = 10 MWDERIVEDUNIT_1__nanomolarity_second;
  kr_GaolfGTPXAC5_ATP__AC5_GaolfGTP_ATP = 1 MWDERIVEDUNIT_1__second;
  kf_GaolfGTPXAC5_Ca_ATP__AC5_Ca_GaolfGTP_ATP = 10 MWDERIVEDUNIT_1__nanomolarity_second;
  kr_GaolfGTPXAC5_Ca_ATP__AC5_Ca_GaolfGTP_ATP = 1 MWDERIVEDUNIT_1__second;
  kf_CaXAC5_ATP__AC5_Ca_ATP = 0.001 MWDERIVEDUNIT_1__nanomolarity_second;
  kr_CaXAC5_ATP__AC5_Ca_ATP = 10 MWDERIVEDUNIT_1__second;
  kf_AC5_GaolfGTP_ATP__cAMPXAC5_GaolfGTP = 50 MWDERIVEDUNIT_1__second;
  kf_cAMPXAC5_GaolfGTP__AC5_GaolfGTP_ATP = 2.55 MWDERIVEDUNIT_1__nanomolarity_second;
  kf_AC5_ATP__cAMPXAC5 = 1 MWDERIVEDUNIT_1__second;
  kf_cAMPXAC5__AC5_ATP = 0.002 MWDERIVEDUNIT_1__nanomolarity_second;
  kf_AC5_Ca_ATP__cAMPXAC5_Ca = 0.5 MWDERIVEDUNIT_1__second;
  kf_cAMPXAC5_Ca__AC5_Ca_ATP = 0.00075 MWDERIVEDUNIT_1__nanomolarity_second;
  kf_AC5_Ca_GaolfGTP_ATP__cAMPXAC5_Ca_GaolfGTP = 25 MWDERIVEDUNIT_1__second;
  kf_cAMPXAC5_Ca_GaolfGTP__AC5_Ca_GaolfGTP_ATP = 0.65 MWDERIVEDUNIT_1__nanomolarity_second;
  kf_AC5_GaolfGTP__AC5XGaolfGDP = 1 MWDERIVEDUNIT_1__second;
  kf_AC5_Ca_GaolfGTP__AC5_CaXGaolfGDP = 1 MWDERIVEDUNIT_1__second;
  kf_AC5_GaolfGTP_ATP__AC5_ATPXGaolfGDP = 1 MWDERIVEDUNIT_1__second;
  kf_AC5_Ca_GaolfGTP_ATP__AC5_Ca_ATPXGaolfGDP = 1 MWDERIVEDUNIT_1__second;
  kf_D1RXGolf__D1R_Golf = 0.06 MWDERIVEDUNIT_1__nanomolarity_second;
  kr_D1RXGolf__D1R_Golf = 250 MWDERIVEDUNIT_1__second;
  kf_GolfXD1R_DA__D1R_Golf_DA = 0.06 MWDERIVEDUNIT_1__nanomolarity_second;
  kr_GolfXD1R_DA__D1R_Golf_DA = 250 MWDERIVEDUNIT_1__second;
  kf_cAMPXPDE10c__PDE10c_cAMP = 0.1 MWDERIVEDUNIT_1__nanomolarity_second;
  kr_cAMPXPDE10c__PDE10c_cAMP = 2 MWDERIVEDUNIT_1__second;
  kf_CaMKIIXCaM_Ca4__CaMKII_CaM_Ca4 = 0.1 MWDERIVEDUNIT_1__nanomolarity_second;
  kr_CaMKIIXCaM_Ca4__CaMKII_CaM_Ca4 = 40 MWDERIVEDUNIT_1__second;
  kf_CaM_Ca2XCaMKII__CaMKII_CaM_Ca2 = 0.1 MWDERIVEDUNIT_1__nanomolarity_second;
  kr_CaM_Ca2XCaMKII__CaMKII_CaM_Ca2 = 400 MWDERIVEDUNIT_1__second;
  kf_CaMXCaMKII__CaMKII_CaM = 0.1 MWDERIVEDUNIT_1__nanomolarity_second;
  kr_CaMXCaMKII__CaMKII_CaM = 4000 MWDERIVEDUNIT_1__second;
  kf_CaMKII_CaM_Ca2XCa__CaMKII_CaM_Ca4 = 0.1 MWDERIVEDUNIT_1__nanomolarity_second;
  kr_CaMKII_CaM_Ca2XCa__CaMKII_CaM_Ca4 = 100 MWDERIVEDUNIT_1__second;
  kf_CaMKII_CaMXCa__CaMKII_CaM_Ca2 = 0.006 MWDERIVEDUNIT_1__nanomolarity_second;
  kr_CaMKII_CaMXCa__CaMKII_CaM_Ca2 = 2 MWDERIVEDUNIT_1__second;
  kf_pCaMKII_CaM_Ca2XCa__pCaMKII_CaM_Ca4 = 0.1 MWDERIVEDUNIT_1__nanomolarity_second;
  kr_pCaMKII_CaM_Ca2XCa__pCaMKII_CaM_Ca4 = 10 MWDERIVEDUNIT_1__second;
  kf_pCaMKII_CaMXCa__pCaMKII_CaM_Ca2 = 0.006 MWDERIVEDUNIT_1__nanomolarity_second;
  kr_pCaMKII_CaMXCa__pCaMKII_CaM_Ca2 = 2 MWDERIVEDUNIT_1__second;
  kf_pCaMKIIXCaM_Ca4__pCaMKII_CaM_Ca4 = 0.1 MWDERIVEDUNIT_1__nanomolarity_second;
  kr_pCaMKIIXCaM_Ca4__pCaMKII_CaM_Ca4 = 0.4 MWDERIVEDUNIT_1__second;
  kf_pCaMKIIXCaM_Ca2__pCaMKII_CaM_Ca2 = 0.1 MWDERIVEDUNIT_1__nanomolarity_second;
  kr_pCaMKIIXCaM_Ca2__pCaMKII_CaM_Ca2 = 40 MWDERIVEDUNIT_1__second;
  kf_pCaMKIIXCaM__pCaMKII_CaM = 0.1 MWDERIVEDUNIT_1__nanomolarity_second;
  kr_pCaMKIIXCaM__pCaMKII_CaM = 400 MWDERIVEDUNIT_1__second;
  kf_ARPP21XPKAc__PKAc_ARPP21 = 0.045 MWDERIVEDUNIT_1__nanomolarity_second;
  kr_ARPP21XPKAc__PKAc_ARPP21 = 200 MWDERIVEDUNIT_1__second;
  kf_PKAc_ARPP21__PKAcXpARPP21 = 10 MWDERIVEDUNIT_1__second;
  kf_pARPP21XCaM_Ca4__CaM_Ca4_pARPP21 = 0.5 MWDERIVEDUNIT_1__nanomolarity_second;
  kr_pARPP21XCaM_Ca4__CaM_Ca4_pARPP21 = 10 MWDERIVEDUNIT_1__second;
  kf_B72PP2A_Ca_pARPP21__ARPP21XB72PP2A_Ca = 10 MWDERIVEDUNIT_1__second;
  kf_pARPP21XB72PP2A_Ca__B72PP2A_Ca_pARPP21 = 0.007 MWDERIVEDUNIT_1__nanomolarity_second;
  kr_pARPP21XB72PP2A_Ca__B72PP2A_Ca_pARPP21 = 100 MWDERIVEDUNIT_1__second;
  kf_B72PP2A_pARPP21__ARPP21XB72PP2A = 1 MWDERIVEDUNIT_1__second;
  kf_pARPP21XB72PP2A__B72PP2A_pARPP21 = 0.004 MWDERIVEDUNIT_1__nanomolarity_second;
  kr_pARPP21XB72PP2A__B72PP2A_pARPP21 = 100 MWDERIVEDUNIT_1__second;
  kf_B56PP2Ap_pARPP21__ARPP21XB56PP2Ap = 10 MWDERIVEDUNIT_1__second;
  kf_pARPP21XB56PP2Ap__B56PP2Ap_pARPP21 = 0.007 MWDERIVEDUNIT_1__nanomolarity_second;
  kr_pARPP21XB56PP2Ap__B56PP2Ap_pARPP21 = 100 MWDERIVEDUNIT_1__second;
  kf_B56PP2A_pARPP21__ARPP21XB56PP2A = 1 MWDERIVEDUNIT_1__second;
  kf_pARPP21XB56PP2A__B56PP2A_pARPP21 = 0.004 MWDERIVEDUNIT_1__nanomolarity_second;
  kr_pARPP21XB56PP2A__B56PP2A_pARPP21 = 100 MWDERIVEDUNIT_1__second;
  kf_pSubstrateXPP1__PP1_pSubstrate = 0.0005 MWDERIVEDUNIT_1__nanomolarity_second;
  kr_pSubstrateXPP1__PP1_pSubstrate = 1 MWDERIVEDUNIT_1__second;
  kf_PP1_pSubstrate__PP1XSubstrate = 10 MWDERIVEDUNIT_1__second;
  kf_SubstrateXpCaMKII_psd__pCaMKII_psd_Substrate = 0.0005 MWDERIVEDUNIT_1__nanomolarity_second;
  kr_SubstrateXpCaMKII_psd__pCaMKII_psd_Substrate = 10 MWDERIVEDUNIT_1__second;
  kf_pCaMKII_psd_Substrate__pCaMKII_psdXpSubstrate = 10 MWDERIVEDUNIT_1__second;
  kf_pCaMKII__CaMKII = 0.1 MWDERIVEDUNIT_1__second;
  kf_SubstrateXpCaMKII_CaM_psd__pCaMKII_CaM_psd_Substrate = 0.0005 MWDERIVEDUNIT_1__nanomolarity_second;
  kr_SubstrateXpCaMKII_CaM_psd__pCaMKII_CaM_psd_Substrate = 10 MWDERIVEDUNIT_1__second;
  kf_pCaMKII_CaM_psd_Substrate__pCaMKII_CaM_psdXpSubstrate = 10 MWDERIVEDUNIT_1__second;
  parameter_259 = 0.0005 MWDERIVEDUNIT_1__nanomolarity_second; parameter_259 is "kf_SubstrateXpCaMKII_CaM_Ca2_psd__pCaMKII_CaM_Ca2_psd_Substrate";
  parameter_260 = 10 MWDERIVEDUNIT_1__second; parameter_260 is "kr_SubstrateXpCaMKII_CaM_Ca2_psd__pCaMKII_CaM_Ca2_psd_Substrate";
  parameter_261 = 10 MWDERIVEDUNIT_1__second; parameter_261 is "kf_pCaMKII_CaM_Ca2_psd_Substrate__pCaMKII_CaM_Ca2_psdXpSubstrate";
  parameter_262 = 0.0005 MWDERIVEDUNIT_1__nanomolarity_second; parameter_262 is "kf_SubstrateXpCaMKII_CaM_Ca4_psd__pCaMKII_CaM_Ca4_psd_Substrate";
  parameter_263 = 10 MWDERIVEDUNIT_1__second; parameter_263 is "kr_SubstrateXpCaMKII_CaM_Ca4_psd__pCaMKII_CaM_Ca4_psd_Substrate";
  parameter_264 = 10 MWDERIVEDUNIT_1__second; parameter_264 is "kf_pCaMKII_CaM_Ca4_psd_Substrate__pCaMKII_CaM_Ca4_psdXpSubstrate";
  kf_SubstrateXCaMKII_CaM_psd__CaMKII_CaM_psd_Substrate = 0.0005 MWDERIVEDUNIT_1__nanomolarity_second;
  kr_SubstrateXCaMKII_CaM_psd__CaMKII_CaM_psd_Substrate = 10 MWDERIVEDUNIT_1__second;
  kf_CaMKII_CaM_psd_Substrate__CaMKII_CaM_psdXpSubstrate = 10 MWDERIVEDUNIT_1__second;
  parameter_268 = 0.0005 MWDERIVEDUNIT_1__nanomolarity_second; parameter_268 is "kf_SubstrateXCaMKII_CaM_Ca2_psd__CaMKII_CaM_Ca2_psd_Substrate";
  parameter_269 = 10 MWDERIVEDUNIT_1__second; parameter_269 is "kr_SubstrateXCaMKII_CaM_Ca2_psd__CaMKII_CaM_Ca2_psd_Substrate";
  parameter_270 = 10 MWDERIVEDUNIT_1__second; parameter_270 is "kf_CaMKII_CaM_Ca2_psd_Substrate__CaMKII_CaM_Ca2_psdXpSubstrate";
  parameter_271 = 0.0005 MWDERIVEDUNIT_1__nanomolarity_second; parameter_271 is "kf_SubstrateXCaMKII_CaM_Ca4_psd__CaMKII_CaM_Ca4_psd_Substrate";
  parameter_272 = 10 MWDERIVEDUNIT_1__second; parameter_272 is "kr_SubstrateXCaMKII_CaM_Ca4_psd__CaMKII_CaM_Ca4_psd_Substrate";
  parameter_273 = 10 MWDERIVEDUNIT_1__second; parameter_273 is "kf_CaMKII_CaM_Ca4_psd_Substrate__CaMKII_CaM_Ca4_psdXpSubstrate";
  kf_pCaMKII_CaM_Ca4__pCaMKII_CaM_Ca4_psd = 0.5 MWDERIVEDUNIT_1__second;
  kr_pCaMKII_CaM_Ca4__pCaMKII_CaM_Ca4_psd = 0.001 MWDERIVEDUNIT_1__second;
  kf_pCaMKII_CaM_Ca2__pCaMKII_CaM_Ca2_psd = 0.5 MWDERIVEDUNIT_1__second;
  kr_pCaMKII_CaM_Ca2__pCaMKII_CaM_Ca2_psd = 0.001 MWDERIVEDUNIT_1__second;
  kf_pCaMKII_CaM__pCaMKII_CaM_psd = 0.5 MWDERIVEDUNIT_1__second;
  kr_pCaMKII_CaM__pCaMKII_CaM_psd = 0.001 MWDERIVEDUNIT_1__second;
  kf_pCaMKII__pCaMKII_psd = 0.5 MWDERIVEDUNIT_1__second;
  kr_pCaMKII__pCaMKII_psd = 0.001 MWDERIVEDUNIT_1__second;
  kf_CaM_Ca4XpCaMKII_psd__pCaMKII_CaM_Ca4_psd = 0.1 MWDERIVEDUNIT_1__nanomolarity_second;
  kr_CaM_Ca4XpCaMKII_psd__pCaMKII_CaM_Ca4_psd = 0.4 MWDERIVEDUNIT_1__second;
  kf_pCaMKII_psdXCaM_Ca2__pCaMKII_CaM_Ca2_psd = 0.1 MWDERIVEDUNIT_1__nanomolarity_second;
  kr_pCaMKII_psdXCaM_Ca2__pCaMKII_CaM_Ca2_psd = 40 MWDERIVEDUNIT_1__second;
  kf_CaMXpCaMKII_psd__pCaMKII_CaM_psd = 0.1 MWDERIVEDUNIT_1__nanomolarity_second;
  kr_CaMXpCaMKII_psd__pCaMKII_CaM_psd = 400 MWDERIVEDUNIT_1__second;
  kf_pCaMKII_CaM_psdXCa__pCaMKII_CaM_Ca2_psd = 0.006 MWDERIVEDUNIT_1__nanomolarity_second;
  kr_pCaMKII_CaM_psdXCa__pCaMKII_CaM_Ca2_psd = 2 MWDERIVEDUNIT_1__second;
  kf_pCaMKII_CaM_Ca2_psdXCa__pCaMKII_CaM_Ca4_psd = 0.1 MWDERIVEDUNIT_1__nanomolarity_second;
  kr_pCaMKII_CaM_Ca2_psdXCa__pCaMKII_CaM_Ca4_psd = 10 MWDERIVEDUNIT_1__second;
  kf_pCaMKII_psdXPP1__PP1_pCaMKII_psd = 0.0008 MWDERIVEDUNIT_1__nanomolarity_second;
  kr_pCaMKII_psdXPP1__PP1_pCaMKII_psd = 1 MWDERIVEDUNIT_1__second;
  kf_PP1_pCaMKII_psd__PP1XCaMKII_psd = 1 MWDERIVEDUNIT_1__second;
  kf_CaMKII_psd__CaMKII = 0.5 MWDERIVEDUNIT_1__second;
  kf_CaM_Ca4XCaMKII_psd__CaMKII_CaM_Ca4_psd = 0.1 MWDERIVEDUNIT_1__nanomolarity_second;
  kr_CaM_Ca4XCaMKII_psd__CaMKII_CaM_Ca4_psd = 40 MWDERIVEDUNIT_1__second;
  kf_CaM_Ca2XCaMKII_psd__CaMKII_CaM_Ca2_psd = 0.1 MWDERIVEDUNIT_1__nanomolarity_second;
  kr_CaM_Ca2XCaMKII_psd__CaMKII_CaM_Ca2_psd = 400 MWDERIVEDUNIT_1__second;
  kf_CaMXCaMKII_psd__CaMKII_CaM_psd = 0.1 MWDERIVEDUNIT_1__nanomolarity_second;
  kr_CaMXCaMKII_psd__CaMKII_CaM_psd = 4000 MWDERIVEDUNIT_1__second;
  kf_CaMKII_CaM_Ca2_psdXCa__CaMKII_CaM_Ca4_psd = 0.1 MWDERIVEDUNIT_1__nanomolarity_second;
  kr_CaMKII_CaM_Ca2_psdXCa__CaMKII_CaM_Ca4_psd = 100 MWDERIVEDUNIT_1__second;
  kf_CaMKII_CaM_psdXCa__CaMKII_CaM_Ca2_psd = 0.006 MWDERIVEDUNIT_1__nanomolarity_second;
  kr_CaMKII_CaM_psdXCa__CaMKII_CaM_Ca2_psd = 2 MWDERIVEDUNIT_1__second;
  kf_CaMKII_CaM__CaMKII_CaM_psd = 0.5 MWDERIVEDUNIT_1__second;
  kr_CaMKII_CaM__CaMKII_CaM_psd = 0.5 MWDERIVEDUNIT_1__second;
  kf_CaMKII_CaM_Ca2__CaMKII_CaM_Ca2_psd = 0.5 MWDERIVEDUNIT_1__second;
  kr_CaMKII_CaM_Ca2__CaMKII_CaM_Ca2_psd = 0.5 MWDERIVEDUNIT_1__second;
  kf_CaMKII_CaM_Ca4__CaMKII_CaM_Ca4_psd = 0.5 MWDERIVEDUNIT_1__second;
  kr_CaMKII_CaM_Ca4__CaMKII_CaM_Ca4_psd = 0.5 MWDERIVEDUNIT_1__second;
  parameter_312 = 5.7e-5 MWDERIVEDUNIT_1__nanomolarity_second; parameter_312 is "kf_CaMKII_CaM_Ca4XCaMKII_CaM_Ca4__CaMKII_CaM_Ca4_CaMKII_CaM_Ca4";
  parameter_313 = 0.015 MWDERIVEDUNIT_1__second; parameter_313 is "kr_CaMKII_CaM_Ca4XCaMKII_CaM_Ca4__CaMKII_CaM_Ca4_CaMKII_CaM_Ca4";
  parameter_314 = 95036 MWDERIVEDUNIT_1__second; parameter_314 is "kf_CaMKII_CaM_Ca4_CaMKII_CaM_Ca4__pCaMKII_CaM_Ca4XCaMKII_CaM_Ca4";
  parameter_315 = 0.0015 MWDERIVEDUNIT_1__nanomolarity_second; parameter_315 is "kf_pCaMKII_CaM_Ca4XCaMKII_CaM_Ca4__pCaMKII_CaM_Ca4_CaMKII_CaM_Ca4";
  parameter_316 = 2336.4 MWDERIVEDUNIT_1__second; parameter_316 is "kr_pCaMKII_CaM_Ca4XCaMKII_CaM_Ca4__pCaMKII_CaM_Ca4_CaMKII_CaM_Ca4";
  parameter_317 = 3714.2 MWDERIVEDUNIT_1__second; parameter_317 is "kf_pCaMKII_CaM_Ca4_CaMKII_CaM_Ca4__pCaMKII_CaM_Ca4XpCaMKII_CaM_Ca4";
  parameter_318 = 5.7e-5 MWDERIVEDUNIT_1__nanomolarity_second; parameter_318 is "kf_CaMKII_CaM_Ca4_psdXCaMKII_CaM_Ca4_psd__CaMKII_CaM_Ca4_psd_CaMKII_CaM_Ca4_psd";
  parameter_319 = 0.015 MWDERIVEDUNIT_1__second; parameter_319 is "kr_CaMKII_CaM_Ca4_psdXCaMKII_CaM_Ca4_psd__CaMKII_CaM_Ca4_psd_CaMKII_CaM_Ca4_psd";
  parameter_320 = 95036 MWDERIVEDUNIT_1__second; parameter_320 is "kf_CaMKII_CaM_Ca4_psd_CaMKII_CaM_Ca4_psd__pCaMKII_CaM_Ca4_psdXCaMKII_CaM_Ca4_psd";
  parameter_321 = 0.0015 MWDERIVEDUNIT_1__nanomolarity_second; parameter_321 is "kf_pCaMKII_CaM_Ca4_psdXCaMKII_CaM_Ca4_psd__pCaMKII_CaM_Ca4_psd_CaMKII_CaM_Ca4_psd";
  parameter_322 = 2336.4 MWDERIVEDUNIT_1__second; parameter_322 is "kr_pCaMKII_CaM_Ca4_psdXCaMKII_CaM_Ca4_psd__pCaMKII_CaM_Ca4_psd_CaMKII_CaM_Ca4_psd";
  parameter_323 = 3714.2 MWDERIVEDUNIT_1__second; parameter_323 is "kf_pCaMKII_CaM_Ca4_psd_CaMKII_CaM_Ca4_psd__pCaMKII_CaM_Ca4_psdXpCaMKII_CaM_Ca4_psd";
  parameter_324 = 0.5 MWDERIVEDUNIT_1__second; parameter_324 is "kf_CaMKII_CaM_Ca4_psd_CaMKII_CaM_Ca4_psd__CaMKII_CaM_Ca4_CaMKII_CaM_Ca4";
  parameter_325 = 0.5 MWDERIVEDUNIT_1__second; parameter_325 is "kr_CaMKII_CaM_Ca4_psd_CaMKII_CaM_Ca4_psd__CaMKII_CaM_Ca4_CaMKII_CaM_Ca4";
  parameter_326 = 0.001 MWDERIVEDUNIT_1__second; parameter_326 is "kf_pCaMKII_CaM_Ca4_psd_CaMKII_CaM_Ca4_psd__pCaMKII_CaM_Ca4_CaMKII_CaM_Ca4";
  parameter_327 = 0.5 MWDERIVEDUNIT_1__second; parameter_327 is "kr_pCaMKII_CaM_Ca4_psd_CaMKII_CaM_Ca4_psd__pCaMKII_CaM_Ca4_CaMKII_CaM_Ca4";

  // Reactions:
  reaction_328: GaolfGTP => GaolfGDP; kf_GaolfGTP__GaolfGDP*GaolfGTP*Spine;
  reaction_329: D1R_Golf_DA => Gbgolf + D1R_DA + GaolfGTP; kf_D1R_Golf_DA__GbgolfXD1R_DAXGaolfGTP*D1R_Golf_DA*Spine;
  reaction_330: D1R_Golf + DA -> D1R_Golf_DA; kf_D1R_GolfXDA__D1R_Golf_DA*D1R_Golf*DA*Spine - kr_D1R_GolfXDA__D1R_Golf_DA*D1R_Golf_DA*Spine;
  reaction_331: D1R + DA -> D1R_DA; kf_D1RXDA__D1R_DA*D1R*DA*Spine - kr_D1RXDA__D1R_DA*D1R_DA*Spine;
  reaction_332: AC5 + GaolfGTP -> AC5_GaolfGTP; kf_AC5XGaolfGTP__AC5_GaolfGTP*AC5*GaolfGTP*Spine - kr_AC5XGaolfGTP__AC5_GaolfGTP*AC5_GaolfGTP*Spine;
  reaction_333: CaM + Ca -> CaM_Ca2; kf_CaMXCa__CaM_Ca2*CaM*Ca*Spine - kr_CaMXCa__CaM_Ca2*CaM_Ca2*Spine;
  reaction_334: PP2B + CaM -> PP2B_CaM; kf_PP2BXCaM__PP2B_CaM*PP2B*CaM*Spine - kr_PP2BXCaM__PP2B_CaM*PP2B_CaM*Spine;
  reaction_335: CaM_Ca4 + PP2B -> PP2Bc; kf_CaM_Ca4XPP2B__PP2Bc*CaM_Ca4*PP2B*Spine - kr_CaM_Ca4XPP2B__PP2Bc*PP2Bc*Spine;
  reaction_336: PKAc + D32 -> PKAc_D32; kf_PKAcXD32__PKAc_D32*PKAc*D32*Spine - kr_PKAcXD32__PKAc_D32*PKAc_D32*Spine;
  reaction_337: PKAc_D32 => D32p34 + PKAc; kf_PKAc_D32__D32p34XPKAc*PKAc_D32*Spine;
  reaction_338: PKAc + B56PP2A -> PKAc_B56PP2A; kf_PKAcXB56PP2A__PKAc_B56PP2A*PKAc*B56PP2A*Spine - kr_PKAcXB56PP2A__PKAc_B56PP2A*PKAc_B56PP2A*Spine;
  reaction_339: PKAc_B56PP2A => B56PP2Ap + PKAc; kf_PKAc_B56PP2A__B56PP2ApXPKAc*PKAc_B56PP2A*Spine;
  reaction_340: D32p34 + PP1 -> PP1_D32p34; kf_D32p34XPP1__PP1_D32p34*D32p34*PP1*Spine - kr_D32p34XPP1__PP1_D32p34*PP1_D32p34*Spine;
  reaction_341: CDK5 + D32 -> CDK5_D32; kf_CDK5XD32__CDK5_D32*CDK5*D32*Spine - kr_CDK5XD32__CDK5_D32*CDK5_D32*Spine;
  reaction_342: CDK5_D32 => CDK5 + D32p75; kf_CDK5_D32__CDK5XD32p75*CDK5_D32*Spine;
  reaction_343: D32p75 + PKAc -> PKAc_D32p75; kf_D32p75XPKAc__PKAc_D32p75*D32p75*PKAc*Spine - kr_D32p75XPKAc__PKAc_D32p75*PKAc_D32p75*Spine;
  reaction_344: B72PP2A + Ca -> B72PP2A_Ca; kf_B72PP2AXCa__B72PP2A_Ca*B72PP2A*Ca*Spine - kr_B72PP2AXCa__B72PP2A_Ca*B72PP2A_Ca*Spine;
  reaction_345: B56PP2Ap + D32p75 -> B56PP2Ap_D32p75; kf_B56PP2ApXD32p75__B56PP2Ap_D32p75*B56PP2Ap*D32p75*Spine - kr_B56PP2ApXD32p75__B56PP2Ap_D32p75*B56PP2Ap_D32p75*Spine;
  reaction_346: B72PP2A + D32p75 -> B72PP2A_D32p75; kf_B72PP2AXD32p75__B72PP2A_D32p75*B72PP2A*D32p75*Spine - kr_B72PP2AXD32p75__B72PP2A_D32p75*B72PP2A_D32p75*Spine;
  reaction_347: D32p75 + B72PP2A_Ca -> B72PP2A_Ca_D32p75; kf_D32p75XB72PP2A_Ca__B72PP2A_Ca_D32p75*D32p75*B72PP2A_Ca*Spine - kr_D32p75XB72PP2A_Ca__B72PP2A_Ca_D32p75*B72PP2A_Ca_D32p75*Spine;
  reaction_348: B56PP2Ap_D32p75 => B56PP2Ap + D32; kf_B56PP2Ap_D32p75__B56PP2ApXD32*B56PP2Ap_D32p75*Spine;
  reaction_349: B72PP2A_D32p75 => B72PP2A + D32; kf_B72PP2A_D32p75__B72PP2AXD32*B72PP2A_D32p75*Spine;
  reaction_350: B72PP2A_Ca_D32p75 => B72PP2A_Ca + D32; kf_B72PP2A_Ca_D32p75__B72PP2A_CaXD32*B72PP2A_Ca_D32p75*Spine;
  reaction_351: D32p34 + PP2Bc -> PP2Bc_D32p34; kf_D32p34XPP2Bc__PP2Bc_D32p34*D32p34*PP2Bc*Spine - kr_D32p34XPP2Bc__PP2Bc_D32p34*PP2Bc_D32p34*Spine;
  reaction_352: CaM_Ca2 + Ca -> CaM_Ca4; kf_CaM_Ca2XCa__CaM_Ca4*CaM_Ca2*Ca*Spine - kr_CaM_Ca2XCa__CaM_Ca4*CaM_Ca4*Spine;
  reaction_353: Ca + PP2B_CaM -> PP2B_CaM_Ca2; kf_CaXPP2B_CaM__PP2B_CaM_Ca2*Ca*PP2B_CaM*Spine - kr_CaXPP2B_CaM__PP2B_CaM_Ca2*PP2B_CaM_Ca2*Spine;
  reaction_354: Ca + PP2B_CaM_Ca2 -> PP2Bc; kf_CaXPP2B_CaM_Ca2__PP2Bc*Ca*PP2B_CaM_Ca2*Spine - kr_CaXPP2B_CaM_Ca2__PP2Bc*PP2Bc*Spine;
  reaction_355: CaM_Ca2 + PP2B -> PP2B_CaM_Ca2; kf_CaM_Ca2XPP2B__PP2B_CaM_Ca2*CaM_Ca2*PP2B*Spine - kr_CaM_Ca2XPP2B__PP2B_CaM_Ca2*PP2B_CaM_Ca2*Spine;
  reaction_356: AC5 + Ca -> AC5_Ca; kf_AC5XCa__AC5_Ca*AC5*Ca*Spine - kr_AC5XCa__AC5_Ca*AC5_Ca*Spine;
  reaction_357: AC5_Ca + GaolfGTP -> AC5_Ca_GaolfGTP; kf_AC5_CaXGaolfGTP__AC5_Ca_GaolfGTP*AC5_Ca*GaolfGTP*Spine - kr_AC5_CaXGaolfGTP__AC5_Ca_GaolfGTP*AC5_Ca_GaolfGTP*Spine;
  reaction_358: D32p75 + B56PP2A -> B56PP2A_D32p75; kf_D32p75XB56PP2A__B56PP2A_D32p75*D32p75*B56PP2A*Spine - kr_D32p75XB56PP2A__B56PP2A_D32p75*B56PP2A_D32p75*Spine;
  reaction_359: B56PP2A_D32p75 => B56PP2A + D32; kf_B56PP2A_D32p75__B56PP2AXD32*B56PP2A_D32p75*Spine;
  reaction_360: B72PP2A_Ca_D32p34 => B72PP2A_Ca + D32; kf_B72PP2A_Ca_D32p34__B72PP2A_CaXD32*B72PP2A_Ca_D32p34*Spine;
  reaction_361: B72PP2A_D32p34 => D32 + B72PP2A; kf_B72PP2A_D32p34__D32XB72PP2A*B72PP2A_D32p34*Spine;
  reaction_362: D32p34 + B72PP2A_Ca -> B72PP2A_Ca_D32p34; kf_D32p34XB72PP2A_Ca__B72PP2A_Ca_D32p34*D32p34*B72PP2A_Ca*Spine - kr_D32p34XB72PP2A_Ca__B72PP2A_Ca_D32p34*B72PP2A_Ca_D32p34*Spine;
  reaction_363: D32p34 + B72PP2A -> B72PP2A_D32p34; kf_D32p34XB72PP2A__B72PP2A_D32p34*D32p34*B72PP2A*Spine - kr_D32p34XB72PP2A__B72PP2A_D32p34*B72PP2A_D32p34*Spine;
  reaction_364: PP2Bc_D32p34 => D32 + PP2Bc; kf_PP2Bc_D32p34__D32XPP2Bc*PP2Bc_D32p34*Spine;
  reaction_365: B56PP2Ap => B56PP2A; kf_B56PP2Ap__B56PP2A*B56PP2Ap*Spine;
  reaction_366: cAMP + PKA -> PKA_Ca2MP; kf_cAMPXPKA__PKA_Ca2MP*cAMP*PKA*Spine - kr_cAMPXPKA__PKA_Ca2MP*PKA_Ca2MP*Spine;
  reaction_367: cAMP + PKA_Ca2MP -> PKA_Ca4MP; kf_cAMPXPKA_Ca2MP__PKA_Ca4MP*cAMP*PKA_Ca2MP*Spine - kr_cAMPXPKA_Ca2MP__PKA_Ca4MP*PKA_Ca4MP*Spine;
  reaction_368: PKA_Ca4MP -> PKAc + PKAreg; kf_PKA_Ca4MP__PKAcXPKAreg*PKA_Ca4MP*Spine - kr_PKA_Ca4MP__PKAcXPKAreg*PKAc*PKAreg*Spine;
  reaction_369: cAMP + PDE4 -> PDE4_cAMP; kf_cAMPXPDE4__PDE4_cAMP*cAMP*PDE4*Spine - kr_cAMPXPDE4__PDE4_cAMP*PDE4_cAMP*Spine;
  reaction_370: PDE4_cAMP => PDE4 + AMP; kf_PDE4_cAMP__PDE4XAMP*PDE4_cAMP*Spine;
  reaction_371: PDE10r + 2 cAMP -> PDE10c; kf_PDE10rX2_cAMP__PDE10c*PDE10r*cAMP^2*Spine - kr_PDE10rX2_cAMP__PDE10c*PDE10c*Spine;
  reaction_372: PDE10r_cAMP => PDE10r + AMP; kf_PDE10r_cAMP__PDE10rXAMP*PDE10r_cAMP*Spine;
  reaction_373: cAMP + PDE10r -> PDE10r_cAMP; kf_cAMPXPDE10r__PDE10r_cAMP*cAMP*PDE10r*Spine - kr_cAMPXPDE10r__PDE10r_cAMP*PDE10r_cAMP*Spine;
  reaction_374: PDE10c_cAMP => PDE10c + AMP; kf_PDE10c_cAMP__PDE10cXAMP*PDE10c_cAMP*Spine;
  reaction_375: GaolfGDP + Gbgolf => Golf; kf_GaolfGDPXGbgolf__Golf*GaolfGDP*Gbgolf*Spine;
  reaction_376: AC5_GaolfGTP + ATP -> AC5_GaolfGTP_ATP; kf_AC5_GaolfGTPXATP__AC5_GaolfGTP_ATP*AC5_GaolfGTP*ATP*Spine - kr_AC5_GaolfGTPXATP__AC5_GaolfGTP_ATP*AC5_GaolfGTP_ATP*Spine;
  reaction_377: AC5 + ATP -> AC5_ATP; kf_AC5XATP__AC5_ATP*AC5*ATP*Spine - kr_AC5XATP__AC5_ATP*AC5_ATP*Spine;
  reaction_378: AC5_Ca + ATP -> AC5_Ca_ATP; kf_AC5_CaXATP__AC5_Ca_ATP*AC5_Ca*ATP*Spine - kr_AC5_CaXATP__AC5_Ca_ATP*AC5_Ca_ATP*Spine;
  reaction_379: AC5_Ca_GaolfGTP + ATP -> AC5_Ca_GaolfGTP_ATP; kf_AC5_Ca_GaolfGTPXATP__AC5_Ca_GaolfGTP_ATP*AC5_Ca_GaolfGTP*ATP*Spine - kr_AC5_Ca_GaolfGTPXATP__AC5_Ca_GaolfGTP_ATP*AC5_Ca_GaolfGTP_ATP*Spine;
  reaction_380: GaolfGTP + AC5_ATP -> AC5_GaolfGTP_ATP; kf_GaolfGTPXAC5_ATP__AC5_GaolfGTP_ATP*GaolfGTP*AC5_ATP*Spine - kr_GaolfGTPXAC5_ATP__AC5_GaolfGTP_ATP*AC5_GaolfGTP_ATP*Spine;
  reaction_381: GaolfGTP + AC5_Ca_ATP -> AC5_Ca_GaolfGTP_ATP; kf_GaolfGTPXAC5_Ca_ATP__AC5_Ca_GaolfGTP_ATP*GaolfGTP*AC5_Ca_ATP*Spine - kr_GaolfGTPXAC5_Ca_ATP__AC5_Ca_GaolfGTP_ATP*AC5_Ca_GaolfGTP_ATP*Spine;
  reaction_382: Ca + AC5_ATP -> AC5_Ca_ATP; kf_CaXAC5_ATP__AC5_Ca_ATP*Ca*AC5_ATP*Spine - kr_CaXAC5_ATP__AC5_Ca_ATP*AC5_Ca_ATP*Spine;
  reaction_383: AC5_GaolfGTP_ATP => cAMP + AC5_GaolfGTP; kf_AC5_GaolfGTP_ATP__cAMPXAC5_GaolfGTP*AC5_GaolfGTP_ATP*Spine;
  reaction_384: cAMP + AC5_GaolfGTP => AC5_GaolfGTP_ATP; kf_cAMPXAC5_GaolfGTP__AC5_GaolfGTP_ATP*cAMP*AC5_GaolfGTP*Spine;
  reaction_385: AC5_ATP => cAMP + AC5; kf_AC5_ATP__cAMPXAC5*AC5_ATP*Spine;
  reaction_386: cAMP + AC5 => AC5_ATP; kf_cAMPXAC5__AC5_ATP*cAMP*AC5*Spine;
  reaction_387: AC5_Ca_ATP => cAMP + AC5_Ca; kf_AC5_Ca_ATP__cAMPXAC5_Ca*AC5_Ca_ATP*Spine;
  reaction_388: cAMP + AC5_Ca => AC5_Ca_ATP; kf_cAMPXAC5_Ca__AC5_Ca_ATP*cAMP*AC5_Ca*Spine;
  reaction_389: AC5_Ca_GaolfGTP_ATP => cAMP + AC5_Ca_GaolfGTP; kf_AC5_Ca_GaolfGTP_ATP__cAMPXAC5_Ca_GaolfGTP*AC5_Ca_GaolfGTP_ATP*Spine;
  reaction_390: cAMP + AC5_Ca_GaolfGTP => AC5_Ca_GaolfGTP_ATP; kf_cAMPXAC5_Ca_GaolfGTP__AC5_Ca_GaolfGTP_ATP*cAMP*AC5_Ca_GaolfGTP*Spine;
  reaction_391: AC5_GaolfGTP => AC5 + GaolfGDP; kf_AC5_GaolfGTP__AC5XGaolfGDP*AC5_GaolfGTP*Spine;
  reaction_392: AC5_Ca_GaolfGTP => AC5_Ca + GaolfGDP; kf_AC5_Ca_GaolfGTP__AC5_CaXGaolfGDP*AC5_Ca_GaolfGTP*Spine;
  reaction_393: AC5_GaolfGTP_ATP => AC5_ATP + GaolfGDP; kf_AC5_GaolfGTP_ATP__AC5_ATPXGaolfGDP*AC5_GaolfGTP_ATP*Spine;
  reaction_394: AC5_Ca_GaolfGTP_ATP => AC5_Ca_ATP + GaolfGDP; kf_AC5_Ca_GaolfGTP_ATP__AC5_Ca_ATPXGaolfGDP*AC5_Ca_GaolfGTP_ATP*Spine;
  reaction_395: D1R + Golf -> D1R_Golf; kf_D1RXGolf__D1R_Golf*D1R*Golf*Spine - kr_D1RXGolf__D1R_Golf*D1R_Golf*Spine;
  reaction_396: Golf + D1R_DA -> D1R_Golf_DA; kf_GolfXD1R_DA__D1R_Golf_DA*Golf*D1R_DA*Spine - kr_GolfXD1R_DA__D1R_Golf_DA*D1R_Golf_DA*Spine;
  reaction_397: cAMP + PDE10c -> PDE10c_cAMP; kf_cAMPXPDE10c__PDE10c_cAMP*cAMP*PDE10c*Spine - kr_cAMPXPDE10c__PDE10c_cAMP*PDE10c_cAMP*Spine;
  reaction_398: CaMKII + CaM_Ca4 -> CaMKII_CaM_Ca4; kf_CaMKIIXCaM_Ca4__CaMKII_CaM_Ca4*CaMKII*CaM_Ca4*Spine - kr_CaMKIIXCaM_Ca4__CaMKII_CaM_Ca4*CaMKII_CaM_Ca4*Spine;
  reaction_399: CaM_Ca2 + CaMKII -> CaMKII_CaM_Ca2; kf_CaM_Ca2XCaMKII__CaMKII_CaM_Ca2*CaM_Ca2*CaMKII*Spine - kr_CaM_Ca2XCaMKII__CaMKII_CaM_Ca2*CaMKII_CaM_Ca2*Spine;
  reaction_400: CaM + CaMKII -> CaMKII_CaM; kf_CaMXCaMKII__CaMKII_CaM*CaM*CaMKII*Spine - kr_CaMXCaMKII__CaMKII_CaM*CaMKII_CaM*Spine;
  reaction_401: CaMKII_CaM_Ca2 + Ca -> CaMKII_CaM_Ca4; kf_CaMKII_CaM_Ca2XCa__CaMKII_CaM_Ca4*CaMKII_CaM_Ca2*Ca*Spine - kr_CaMKII_CaM_Ca2XCa__CaMKII_CaM_Ca4*CaMKII_CaM_Ca4*Spine;
  reaction_402: CaMKII_CaM + Ca -> CaMKII_CaM_Ca2; kf_CaMKII_CaMXCa__CaMKII_CaM_Ca2*CaMKII_CaM*Ca*Spine - kr_CaMKII_CaMXCa__CaMKII_CaM_Ca2*CaMKII_CaM_Ca2*Spine;
  reaction_403: pCaMKII_CaM_Ca2 + Ca -> pCaMKII_CaM_Ca4; kf_pCaMKII_CaM_Ca2XCa__pCaMKII_CaM_Ca4*pCaMKII_CaM_Ca2*Ca*Spine - kr_pCaMKII_CaM_Ca2XCa__pCaMKII_CaM_Ca4*pCaMKII_CaM_Ca4*Spine;
  reaction_404: pCaMKII_CaM + Ca -> pCaMKII_CaM_Ca2; kf_pCaMKII_CaMXCa__pCaMKII_CaM_Ca2*pCaMKII_CaM*Ca*Spine - kr_pCaMKII_CaMXCa__pCaMKII_CaM_Ca2*pCaMKII_CaM_Ca2*Spine;
  reaction_405: pCaMKII + CaM_Ca4 -> pCaMKII_CaM_Ca4; kf_pCaMKIIXCaM_Ca4__pCaMKII_CaM_Ca4*pCaMKII*CaM_Ca4*Spine - kr_pCaMKIIXCaM_Ca4__pCaMKII_CaM_Ca4*pCaMKII_CaM_Ca4*Spine;
  reaction_406: pCaMKII + CaM_Ca2 -> pCaMKII_CaM_Ca2; kf_pCaMKIIXCaM_Ca2__pCaMKII_CaM_Ca2*pCaMKII*CaM_Ca2*Spine - kr_pCaMKIIXCaM_Ca2__pCaMKII_CaM_Ca2*pCaMKII_CaM_Ca2*Spine;
  reaction_407: pCaMKII + CaM -> pCaMKII_CaM; kf_pCaMKIIXCaM__pCaMKII_CaM*pCaMKII*CaM*Spine - kr_pCaMKIIXCaM__pCaMKII_CaM*pCaMKII_CaM*Spine;
  reaction_408: ARPP21 + PKAc -> PKAc_ARPP21; kf_ARPP21XPKAc__PKAc_ARPP21*ARPP21*PKAc*Spine - kr_ARPP21XPKAc__PKAc_ARPP21*PKAc_ARPP21*Spine;
  reaction_409: PKAc_ARPP21 => PKAc + pARPP21; kf_PKAc_ARPP21__PKAcXpARPP21*PKAc_ARPP21*Spine;
  reaction_410: pARPP21 + CaM_Ca4 -> CaM_Ca4_pARPP21; kf_pARPP21XCaM_Ca4__CaM_Ca4_pARPP21*pARPP21*CaM_Ca4*Spine - kr_pARPP21XCaM_Ca4__CaM_Ca4_pARPP21*CaM_Ca4_pARPP21*Spine;
  reaction_411: B72PP2A_Ca_pARPP21 => ARPP21 + B72PP2A_Ca; kf_B72PP2A_Ca_pARPP21__ARPP21XB72PP2A_Ca*B72PP2A_Ca_pARPP21*Spine;
  reaction_412: pARPP21 + B72PP2A_Ca -> B72PP2A_Ca_pARPP21; kf_pARPP21XB72PP2A_Ca__B72PP2A_Ca_pARPP21*pARPP21*B72PP2A_Ca*Spine - kr_pARPP21XB72PP2A_Ca__B72PP2A_Ca_pARPP21*B72PP2A_Ca_pARPP21*Spine;
  reaction_413: B72PP2A_pARPP21 => ARPP21 + B72PP2A; kf_B72PP2A_pARPP21__ARPP21XB72PP2A*B72PP2A_pARPP21*Spine;
  reaction_414: pARPP21 + B72PP2A -> B72PP2A_pARPP21; kf_pARPP21XB72PP2A__B72PP2A_pARPP21*pARPP21*B72PP2A*Spine - kr_pARPP21XB72PP2A__B72PP2A_pARPP21*B72PP2A_pARPP21*Spine;
  reaction_415: B56PP2Ap_pARPP21 => ARPP21 + B56PP2Ap; kf_B56PP2Ap_pARPP21__ARPP21XB56PP2Ap*B56PP2Ap_pARPP21*Spine;
  reaction_416: pARPP21 + B56PP2Ap -> B56PP2Ap_pARPP21; kf_pARPP21XB56PP2Ap__B56PP2Ap_pARPP21*pARPP21*B56PP2Ap*Spine - kr_pARPP21XB56PP2Ap__B56PP2Ap_pARPP21*B56PP2Ap_pARPP21*Spine;
  reaction_417: B56PP2A_pARPP21 => ARPP21 + B56PP2A; kf_B56PP2A_pARPP21__ARPP21XB56PP2A*B56PP2A_pARPP21*Spine;
  reaction_418: pARPP21 + B56PP2A -> B56PP2A_pARPP21; kf_pARPP21XB56PP2A__B56PP2A_pARPP21*pARPP21*B56PP2A*Spine - kr_pARPP21XB56PP2A__B56PP2A_pARPP21*B56PP2A_pARPP21*Spine;
  reaction_419: pSubstrate + PP1 -> PP1_pSubstrate; kf_pSubstrateXPP1__PP1_pSubstrate*pSubstrate*PP1*Spine - kr_pSubstrateXPP1__PP1_pSubstrate*PP1_pSubstrate*Spine;
  reaction_420: PP1_pSubstrate => PP1 + Substrate; kf_PP1_pSubstrate__PP1XSubstrate*PP1_pSubstrate*Spine;
  reaction_421: Substrate + pCaMKII_psd -> pCaMKII_psd_Substrate; kf_SubstrateXpCaMKII_psd__pCaMKII_psd_Substrate*Substrate*pCaMKII_psd*Spine - kr_SubstrateXpCaMKII_psd__pCaMKII_psd_Substrate*pCaMKII_psd_Substrate*Spine;
  reaction_422: pCaMKII_psd_Substrate => pCaMKII_psd + pSubstrate; kf_pCaMKII_psd_Substrate__pCaMKII_psdXpSubstrate*pCaMKII_psd_Substrate*Spine;
  reaction_423: pCaMKII => CaMKII; kf_pCaMKII__CaMKII*pCaMKII*Spine;
  reaction_424: Substrate + pCaMKII_CaM_psd -> pCaMKII_CaM_psd_Substrate; kf_SubstrateXpCaMKII_CaM_psd__pCaMKII_CaM_psd_Substrate*Substrate*pCaMKII_CaM_psd*Spine - kr_SubstrateXpCaMKII_CaM_psd__pCaMKII_CaM_psd_Substrate*pCaMKII_CaM_psd_Substrate*Spine;
  reaction_425: pCaMKII_CaM_psd_Substrate => pCaMKII_CaM_psd + pSubstrate; kf_pCaMKII_CaM_psd_Substrate__pCaMKII_CaM_psdXpSubstrate*pCaMKII_CaM_psd_Substrate*Spine;
  reaction_426: Substrate + pCaMKII_CaM_Ca2_psd -> pCaMKII_CaM_Ca2_psd_Substrate; parameter_259*Substrate*pCaMKII_CaM_Ca2_psd*Spine - parameter_260*pCaMKII_CaM_Ca2_psd_Substrate*Spine;
  reaction_427: pCaMKII_CaM_Ca2_psd_Substrate => pCaMKII_CaM_Ca2_psd + pSubstrate; parameter_261*pCaMKII_CaM_Ca2_psd_Substrate*Spine;
  reaction_428: Substrate + pCaMKII_CaM_Ca4_psd -> pCaMKII_CaM_Ca4_psd_Substrate; parameter_262*Substrate*pCaMKII_CaM_Ca4_psd*Spine - parameter_263*pCaMKII_CaM_Ca4_psd_Substrate*Spine;
  reaction_429: pCaMKII_CaM_Ca4_psd_Substrate => pCaMKII_CaM_Ca4_psd + pSubstrate; parameter_264*pCaMKII_CaM_Ca4_psd_Substrate*Spine;
  reaction_430: Substrate + CaMKII_CaM_psd -> CaMKII_CaM_psd_Substrate; kf_SubstrateXCaMKII_CaM_psd__CaMKII_CaM_psd_Substrate*Substrate*CaMKII_CaM_psd*Spine - kr_SubstrateXCaMKII_CaM_psd__CaMKII_CaM_psd_Substrate*CaMKII_CaM_psd_Substrate*Spine;
  reaction_431: CaMKII_CaM_psd_Substrate => CaMKII_CaM_psd + pSubstrate; kf_CaMKII_CaM_psd_Substrate__CaMKII_CaM_psdXpSubstrate*CaMKII_CaM_psd_Substrate*Spine;
  reaction_432: Substrate + CaMKII_CaM_Ca2_psd -> CaMKII_CaM_Ca2_psd_Substrate; parameter_268*Substrate*CaMKII_CaM_Ca2_psd*Spine - parameter_269*CaMKII_CaM_Ca2_psd_Substrate*Spine;
  reaction_433: CaMKII_CaM_Ca2_psd_Substrate => CaMKII_CaM_Ca2_psd + pSubstrate; parameter_270*CaMKII_CaM_Ca2_psd_Substrate*Spine;
  reaction_434: Substrate + CaMKII_CaM_Ca4_psd -> CaMKII_CaM_Ca4_psd_Substrate; parameter_271*Substrate*CaMKII_CaM_Ca4_psd*Spine - parameter_272*CaMKII_CaM_Ca4_psd_Substrate*Spine;
  reaction_435: CaMKII_CaM_Ca4_psd_Substrate => CaMKII_CaM_Ca4_psd + pSubstrate; parameter_273*CaMKII_CaM_Ca4_psd_Substrate*Spine;
  reaction_436: pCaMKII_CaM_Ca4 -> pCaMKII_CaM_Ca4_psd; kf_pCaMKII_CaM_Ca4__pCaMKII_CaM_Ca4_psd*pCaMKII_CaM_Ca4*Spine - kr_pCaMKII_CaM_Ca4__pCaMKII_CaM_Ca4_psd*pCaMKII_CaM_Ca4_psd*Spine;
  reaction_437: pCaMKII_CaM_Ca2 -> pCaMKII_CaM_Ca2_psd; kf_pCaMKII_CaM_Ca2__pCaMKII_CaM_Ca2_psd*pCaMKII_CaM_Ca2*Spine - kr_pCaMKII_CaM_Ca2__pCaMKII_CaM_Ca2_psd*pCaMKII_CaM_Ca2_psd*Spine;
  reaction_438: pCaMKII_CaM -> pCaMKII_CaM_psd; kf_pCaMKII_CaM__pCaMKII_CaM_psd*pCaMKII_CaM*Spine - kr_pCaMKII_CaM__pCaMKII_CaM_psd*pCaMKII_CaM_psd*Spine;
  reaction_439: pCaMKII -> pCaMKII_psd; kf_pCaMKII__pCaMKII_psd*pCaMKII*Spine - kr_pCaMKII__pCaMKII_psd*pCaMKII_psd*Spine;
  reaction_440: CaM_Ca4 + pCaMKII_psd -> pCaMKII_CaM_Ca4_psd; kf_CaM_Ca4XpCaMKII_psd__pCaMKII_CaM_Ca4_psd*CaM_Ca4*pCaMKII_psd*Spine - kr_CaM_Ca4XpCaMKII_psd__pCaMKII_CaM_Ca4_psd*pCaMKII_CaM_Ca4_psd*Spine;
  reaction_441: pCaMKII_psd + CaM_Ca2 -> pCaMKII_CaM_Ca2_psd; kf_pCaMKII_psdXCaM_Ca2__pCaMKII_CaM_Ca2_psd*pCaMKII_psd*CaM_Ca2*Spine - kr_pCaMKII_psdXCaM_Ca2__pCaMKII_CaM_Ca2_psd*pCaMKII_CaM_Ca2_psd*Spine;
  reaction_442: CaM + pCaMKII_psd -> pCaMKII_CaM_psd; kf_CaMXpCaMKII_psd__pCaMKII_CaM_psd*CaM*pCaMKII_psd*Spine - kr_CaMXpCaMKII_psd__pCaMKII_CaM_psd*pCaMKII_CaM_psd*Spine;
  reaction_443: pCaMKII_CaM_psd + Ca -> pCaMKII_CaM_Ca2_psd; kf_pCaMKII_CaM_psdXCa__pCaMKII_CaM_Ca2_psd*pCaMKII_CaM_psd*Ca*Spine - kr_pCaMKII_CaM_psdXCa__pCaMKII_CaM_Ca2_psd*pCaMKII_CaM_Ca2_psd*Spine;
  reaction_444: pCaMKII_CaM_Ca2_psd + Ca -> pCaMKII_CaM_Ca4_psd; kf_pCaMKII_CaM_Ca2_psdXCa__pCaMKII_CaM_Ca4_psd*pCaMKII_CaM_Ca2_psd*Ca*Spine - kr_pCaMKII_CaM_Ca2_psdXCa__pCaMKII_CaM_Ca4_psd*pCaMKII_CaM_Ca4_psd*Spine;
  reaction_445: pCaMKII_psd + PP1 -> PP1_pCaMKII_psd; kf_pCaMKII_psdXPP1__PP1_pCaMKII_psd*pCaMKII_psd*PP1*Spine - kr_pCaMKII_psdXPP1__PP1_pCaMKII_psd*PP1_pCaMKII_psd*Spine;
  reaction_446: PP1_pCaMKII_psd => PP1 + CaMKII_psd; kf_PP1_pCaMKII_psd__PP1XCaMKII_psd*PP1_pCaMKII_psd*Spine;
  reaction_447: CaMKII_psd => CaMKII; kf_CaMKII_psd__CaMKII*CaMKII_psd*Spine;
  reaction_448: CaM_Ca4 + CaMKII_psd -> CaMKII_CaM_Ca4_psd; kf_CaM_Ca4XCaMKII_psd__CaMKII_CaM_Ca4_psd*CaM_Ca4*CaMKII_psd*Spine - kr_CaM_Ca4XCaMKII_psd__CaMKII_CaM_Ca4_psd*CaMKII_CaM_Ca4_psd*Spine;
  reaction_449: CaM_Ca2 + CaMKII_psd -> CaMKII_CaM_Ca2_psd; kf_CaM_Ca2XCaMKII_psd__CaMKII_CaM_Ca2_psd*CaM_Ca2*CaMKII_psd*Spine - kr_CaM_Ca2XCaMKII_psd__CaMKII_CaM_Ca2_psd*CaMKII_CaM_Ca2_psd*Spine;
  reaction_450: CaM + CaMKII_psd -> CaMKII_CaM_psd; kf_CaMXCaMKII_psd__CaMKII_CaM_psd*CaM*CaMKII_psd*Spine - kr_CaMXCaMKII_psd__CaMKII_CaM_psd*CaMKII_CaM_psd*Spine;
  reaction_451: CaMKII_CaM_Ca2_psd + Ca -> CaMKII_CaM_Ca4_psd; kf_CaMKII_CaM_Ca2_psdXCa__CaMKII_CaM_Ca4_psd*CaMKII_CaM_Ca2_psd*Ca*Spine - kr_CaMKII_CaM_Ca2_psdXCa__CaMKII_CaM_Ca4_psd*CaMKII_CaM_Ca4_psd*Spine;
  reaction_452: CaMKII_CaM_psd + Ca -> CaMKII_CaM_Ca2_psd; kf_CaMKII_CaM_psdXCa__CaMKII_CaM_Ca2_psd*CaMKII_CaM_psd*Ca*Spine - kr_CaMKII_CaM_psdXCa__CaMKII_CaM_Ca2_psd*CaMKII_CaM_Ca2_psd*Spine;
  reaction_453: CaMKII_CaM -> CaMKII_CaM_psd; kf_CaMKII_CaM__CaMKII_CaM_psd*CaMKII_CaM*Spine - kr_CaMKII_CaM__CaMKII_CaM_psd*CaMKII_CaM_psd*Spine;
  reaction_454: CaMKII_CaM_Ca2 -> CaMKII_CaM_Ca2_psd; kf_CaMKII_CaM_Ca2__CaMKII_CaM_Ca2_psd*CaMKII_CaM_Ca2*Spine - kr_CaMKII_CaM_Ca2__CaMKII_CaM_Ca2_psd*CaMKII_CaM_Ca2_psd*Spine;
  reaction_455: CaMKII_CaM_Ca4 -> CaMKII_CaM_Ca4_psd; kf_CaMKII_CaM_Ca4__CaMKII_CaM_Ca4_psd*CaMKII_CaM_Ca4*Spine - kr_CaMKII_CaM_Ca4__CaMKII_CaM_Ca4_psd*CaMKII_CaM_Ca4_psd*Spine;
  reaction_456: CaMKII_CaM_Ca4 + CaMKII_CaM_Ca4 -> CaMKII_CaM_Ca4_CaMKII_CaM_Ca4; parameter_312*CaMKII_CaM_Ca4*CaMKII_CaM_Ca4*Spine - parameter_313*CaMKII_CaM_Ca4_CaMKII_CaM_Ca4*Spine;
  reaction_457: CaMKII_CaM_Ca4_CaMKII_CaM_Ca4 => pCaMKII_CaM_Ca4 + CaMKII_CaM_Ca4; parameter_314*CaMKII_CaM_Ca4_CaMKII_CaM_Ca4*Spine;
  reaction_458: pCaMKII_CaM_Ca4 + CaMKII_CaM_Ca4 -> pCaMKII_CaM_Ca4_CaMKII_CaM_Ca4; parameter_315*pCaMKII_CaM_Ca4*CaMKII_CaM_Ca4*Spine - parameter_316*pCaMKII_CaM_Ca4_CaMKII_CaM_Ca4*Spine;
  reaction_459: pCaMKII_CaM_Ca4_CaMKII_CaM_Ca4 => pCaMKII_CaM_Ca4 + pCaMKII_CaM_Ca4; parameter_317*pCaMKII_CaM_Ca4_CaMKII_CaM_Ca4*Spine;
  reaction_460: CaMKII_CaM_Ca4_psd + CaMKII_CaM_Ca4_psd -> CaMKII_CaM_Ca4_psd_CaMKII_CaM_Ca4_psd; parameter_318*CaMKII_CaM_Ca4_psd*CaMKII_CaM_Ca4_psd*Spine - parameter_319*CaMKII_CaM_Ca4_psd_CaMKII_CaM_Ca4_psd*Spine;
  reaction_461: CaMKII_CaM_Ca4_psd_CaMKII_CaM_Ca4_psd => pCaMKII_CaM_Ca4_psd + CaMKII_CaM_Ca4_psd; parameter_320*CaMKII_CaM_Ca4_psd_CaMKII_CaM_Ca4_psd*Spine;
  reaction_462: pCaMKII_CaM_Ca4_psd + CaMKII_CaM_Ca4_psd -> pCaMKII_CaM_Ca4_psd_CaMKII_CaM_Ca4_psd; parameter_321*pCaMKII_CaM_Ca4_psd*CaMKII_CaM_Ca4_psd*Spine - parameter_322*pCaMKII_CaM_Ca4_psd_CaMKII_CaM_Ca4_psd*Spine;
  reaction_463: pCaMKII_CaM_Ca4_psd_CaMKII_CaM_Ca4_psd => pCaMKII_CaM_Ca4_psd + pCaMKII_CaM_Ca4_psd; parameter_323*pCaMKII_CaM_Ca4_psd_CaMKII_CaM_Ca4_psd*Spine;
  reaction_464: CaMKII_CaM_Ca4_psd_CaMKII_CaM_Ca4_psd -> CaMKII_CaM_Ca4_CaMKII_CaM_Ca4; parameter_324*CaMKII_CaM_Ca4_psd_CaMKII_CaM_Ca4_psd*Spine - parameter_325*CaMKII_CaM_Ca4_CaMKII_CaM_Ca4*Spine;
  reaction_465: pCaMKII_CaM_Ca4_psd_CaMKII_CaM_Ca4_psd -> pCaMKII_CaM_Ca4_CaMKII_CaM_Ca4; parameter_326*pCaMKII_CaM_Ca4_psd_CaMKII_CaM_Ca4_psd*Spine - parameter_327*pCaMKII_CaM_Ca4_CaMKII_CaM_Ca4*Spine;

  // Unit definitions:
  unit MWBUILTINUNIT_liter = metre^3 * 1e-3 dimensionless;
  unit MWDERIVEDUNIT_1__second = dimensionless / second; MWDERIVEDUNIT_1__second is "1/second";
  unit MWDERIVEDUNIT_1__nanomolarity_second = metre^3 * 1000000 dimensionless / (mole * second); MWDERIVEDUNIT_1__nanomolarity_second is "1/(nanomolarity*second)";
  unit MWDERIVEDUNIT_1__nanomolarity___2_second = metre^6 * 1e12 dimensionless / (mole^2 * second); MWDERIVEDUNIT_1__nanomolarity___2_second is "1/(nanomolarity^2*second)";
end
